g := 9.8
m := 1
aa := 1
Ω := 1
λ := g/(aa*Ω^2)
γ := aa^2*m
ind_st := 0
ind_end := 5
ind_count := 1*10^3 - 1
D(u, Y) := [Y[1]; m*aa^2*Ω^2/γ*sin(Y[0])*(cos(Y[0]) - λ)]
Equation(a, b) := Rkadapt([a; b], ind_st, ind_end, ind_count, D)
x_0 := -π
y_0 := -4
x_n := π
y_n := 4
x_count := 7
y_count := 9
X_st := x_0, x_0 + (x_n - x_0)/(x_count - 1) .. x_n
Y_st := y_0, y_0 + (y_n - y_0)/(y_count - 1) .. y_n
XY_st := [
    -π, -π, -π, -π, -π, 0, π/5, 2*π/5, 3*π/5, 4*π/5, π, π, π, π, π;
    4, 3, 2, 1, 0, 0, 0, 0, 0, 0, 0, -1, -2, -3, -4
]
M_XY :=
    k ← 0
    for x ∈ X_st
        for y ∈ Y_st
            k ← k + 1
            M_XY ← Equation(x, y)
            for i ∈ 0 .. ind_count
                if M_XY[:, 1][i] > π
                    ost ← mod(M_XY[:, 1][i], 4*π)
                    M_XY[:, 1][i] ← ost if ost ≤ π
                    M_XY[:, 1][i] ← 2*π - ost if π ≤ ost ≤ 3*π
                    M_XY[:, 1][i] ← ost - 4*π if ost ≥ 3*π
                if M_XY[:, 1][i] < -π
                    ost ← -mod(M_XY[:, 1][i], 4*π)
                    M_XY[:, 1][i] ← -ost if ost ≤ π
                    M_XY[:, 1][i] ← -2*π + ost if π ≤ ost ≤ 3*π
                    M_XY[:, 1][i] ← -ost + 4*π if ost ≥ 3*π
            if k == 1
                M_X ← M_XY[:, 1]
                M_Y ← M_XY[:, 2]
            otherwise
                M_X ← augment(M_X, M_XY[:, 1])
                M_Y ← augment(M_Y, M_XY[:, 2])
    [M_X; M_Y]
M_XY :=
    k ← 0
    for i ∈ 0 .. 14
        k ← k + 1
        M_XY ← Equation(XY_st[:, i][0], XY_st[:, i][1])
        for j ∈ 0 .. ind_count
            if |M_XY[:, 1][j]| > π
                M_XY[:, 1][j] ← M_XY[:, 1][j - 1]
                M_XY[:, 2][j] ← M_XY[:, 2][j - 1]
        if k == 1
            M_X ← M_XY[:, 1]
            M_Y ← M_XY[:, 2]
        otherwise
            M_X ← augment(M_X, M_XY[:, 1])
            M_Y ← augment(M_Y, M_XY[:, 2])
    [M_X; M_Y]
M_XY[0] =  # no stored result
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R := 1
M_cylinder :=
    for i ∈ 0 .. rows(M_XY[0]) - 1
        for j ∈ 0 .. cols(M_XY[0]) - 1
            K ← M_XY[0][i, j]
            if K ≠ "null"
                M_X[i, j] ← R*cos(K)
                M_Y[i, j] ← R*sin(K)
            otherwise
                M_X[i, j] ← "null"
                M_Y[i, j] ← "null"
    [M_X; M_Y]
# [component: inputs (M_cylinder[0], M_cylinder[1], M_XY[1])]
M_cylinder[0] =  # no stored result
