time_start := 0
time_end := 5
time_count := 1*10^2 - 1
D(u, Y) := [(a*(1 - Y[0]) - b*Y[1])*Y[0]; (c*(1 - Y[1]) - d*Y[0])*Y[1]]  # error: This variable is undefined.
Equation(a, b) := Rkadapt([a; b], time_start, time_end, time_count, D)  # error: This variable is undefined.
x_0 := -π
y_0 := -4
x_n := π
y_n := 4
x_count := 7
y_count := 9
X_st := x_0, x_0 + (x_n - x_0)/(x_count - 1) .. x_n
Y_st := y_0, y_0 + (y_n - y_0)/(y_count - 1) .. y_n
M_XYT :=
    k ← 0
    for x ∈ X_st
        for y ∈ Y_st
            M_XY ← Equation(x, y)
            k ← k + 1
            if k == 1
                M_TIME ← M_XY[:, 0]
                M_X ← M_XY[:, 1]
                M_Y ← M_XY[:, 2]
            otherwise
                M_TIME ← augment(M_TIME, M_XY[:, 0])
                M_X ← augment(M_X, M_XY[:, 1])
                M_Y ← augment(M_Y, M_XY[:, 2])
    [M_X; M_Y; M_TIME]  # error: This variable is undefined.
alpha_2d := M_XYT[0][:, 29]  # error: This variable is undefined.
w_round_2d := M_XYT[1][:, 29]  # error: This variable is undefined.
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